*Heading
** Job name: Creep_calibrated_300 Model name: Model-1
** Generated by: Abaqus/CAE 2024
*Preprint, echo=NO, model=NO, history=NO, contact=NO
**
** PARTS
**
*Part, name="ELG Specimen 2024"
*Node
      1,           0.,   60.0278625
      2,           5.,   60.0278625
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*Element, type=CAX4R
  1,   1,  14, 353,  87
  2,  14,  15, 354, 353
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*Nset, nset=Set-1, generate
    1,  1520,     1
*Elset, elset=Set-1, generate
    1,  1359,     1
** Section: Section-1
*Solid Section, elset=Set-1, material=SS316H_RCC-MR
,
*End Part
**
**
** ASSEMBLY
**
*Assembly, name=Assembly
**
*Instance, name="ELG Specimen 2024-1", part="ELG Specimen 2024"
*End Instance
**
*Node
      1,          2.5,   80.0278625,           0.
*Elset, elset="Gauge Length", instance="ELG Specimen 2024-1"
  271,  272,  273,  274,  275,  276
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*Nset, nset=Set-7, instance="ELG Specimen 2024-1"
   7,   8,   9,  10, 112, 113
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*Elset, elset=Set-7, instance="ELG Specimen 2024-1", generate
 352,  621,    1
*Nset, nset=Set-8
 1,
*Nset, nset=Set-9
 1,
*Nset, nset=Set-10, instance="ELG Specimen 2024-1", generate
    1,  1520,     1
*Elset, elset=Set-10, instance="ELG Specimen 2024-1", generate
    1,  1359,     1
*Nset, nset=Set-RP
 1,
*Nset, nset=m_Set-6
 1,
*Elset, elset=_s_Surf-4_S3, internal, instance="ELG Specimen 2024-1", generate
 262,  270,    1
*Surface, type=ELEMENT, name=s_Surf-4
_s_Surf-4_S3, S3
** Constraint: Constraint-1
*Coupling, constraint name=Constraint-1, ref node=m_Set-6, surface=s_Surf-4
*Kinematic
*End Assembly
**
** MATERIALS
**
*Material, name=SS316H_RCC-MR
*Creep, law=TIME, time=CREEP
 2.09381e-16,     4.6, -0.6079
*Elastic
165940., 0.3
*Plastic
 130.272,       0.
 135.363, 0.000686
  140.49,   0.0015
 145.665,  0.00257
 150.884,  0.00388
 156.139,  0.00532
 161.522,  0.00747
 166.878,  0.00931
 172.276,   0.0113
 177.742,   0.0135
  183.29,   0.0161
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 649.243,    0.343
**
** BOUNDARY CONDITIONS
**
** Name: BC-2 Type: Symmetry/Antisymmetry/Encastre
*Boundary
Set-7, ENCASTRE
** Name: BC-3 Type: Displacement/Rotation
*Boundary
Set-8, 1, 1
Set-8, 6, 6
** ----------------------------------------------------------------
**
** STEP: Step-1
**
*Step, name=Step-1, nlgeom=YES
*Static
0.16, 0.16, 1.6e-06, 0.16
**
** LOADS
**
** Name: Load-1   Type: Concentrated force
*Cload
Set-9, 2, 8482.3
**
** OUTPUT REQUESTS
**
*Restart, write, frequency=0
**
** FIELD OUTPUT: F-Output-1
**
*Output, field
*Node Output
CF, RF, U
*Element Output, directions=YES
LE, PE, PEEQ, PEMAG, S
**
** HISTORY OUTPUT: H-Output-1
**
*Output, history, variable=PRESELECT
*End Step
** ----------------------------------------------------------------
**
** STEP: Step-2
**
*Step, name=Step-2, nlgeom=YES, inc=9999999
*Visco, cetol=1e-05
1e-06, 200., 1e-09, 200.
**
** LOADS
**
** Name: Load-1   Type: Concentrated force
*Cload
Set-9, 2, 8482.4
**
** OUTPUT REQUESTS
**
*Restart, write, frequency=0
**
** FIELD OUTPUT: F-Output-1
**
*Output, field
*Node Output
CF, RF, U
*Element Output, directions=YES
CE, EE, LE, PE, PEEQ, PEMAG, S
**
** HISTORY OUTPUT: H-Output-1
**
*Output, history, variable=PRESELECT
*End Step
